*Heading
** Job name: Job-1 Model name: Model-1
** Generated by: Abaqus/CAE Student Edition 6.13-2
*Preprint, echo=NO, model=NO, history=NO, contact=NO
** ----------------------------------------------------------------
**
** PART INSTANCE: Base-1
**
*Node
    562,           0.,           6.,           0.
*Nset, nset=Base-1-RefPt_
562,
*Nset, nset=Base-1_Set-1
562,
*Surface, type=SEGMENTS, name=Base-1_RigidSurface_
START,           0.,           6.
 LINE,          22.,           6.
*Rigid Body, ref node=Base-1-RefPt_, analytical surface=Base-1_RigidSurface_
** ----------------------------------------------------------------
**
** PART INSTANCE: Det-1
**
*System
          0.,          6.,          0.,          1.,          6.,          0.
*Node
      1,           0.,           0.
      2,           1.,           0.
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*Element, type=CAX4R
  1,   1,   2,  13,  12
  2,   2,   3,  14,  13
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*Nset, nset=Det-1_Set-1, generate
   1,  561,    1
*Elset, elset=Det-1_Set-1, generate
   1,  500,    1
*Nset, nset=Det-1_Set-2
 1,
*Elset, elset=_Det-1_cont1_S3, generate
 491,  500,    1
*Surface, type=ELEMENT, name=Det-1_cont1
_Det-1_cont1_S3, S3
*Elset, elset=_Det-1_cont2_S1, generate
  1,  10,   1
*Surface, type=ELEMENT, name=Det-1_cont2
_Det-1_cont2_S1, S1
** Section: sec1
*Solid Section, elset=Det-1_Set-1, material=mat1
,
** ----------------------------------------------------------------
**
** PART INSTANCE: Plate-1
**
*System
          0.,         56.,          0.,          1.,         56.,          0.
*Node
    563,           0.,           0.
    564,          25.,           0.
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*Element, type=CAX3
501, 699, 661, 700
502, 702, 729, 658
503, 784, 743, 747
504, 776, 821, 826
505, 811, 824, 825
506, 834, 818, 820
507, 835, 820, 833
746, 870, 868, 865
*Element, type=CAX4R
508, 584, 675, 676, 583
509, 654, 643, 642, 652
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*Nset, nset=Plate-1_Set-1, generate
 563,  881,    1
*Elset, elset=Plate-1_Set-1, generate
 501,  787,    1
*Nset, nset=Plate-1_Force
565,
*Nset, nset=Plate-1_Force1
565,566,602,603
*Elset, elset=Plate-1_Force1
 549, 556, 662
*Elset, elset=_Plate-1_cont_S4
 508, 532, 533, 534, 539, 541, 544, 585, 597, 601, 608, 614, 618, 627
*Elset, elset=_Plate-1_cont_S1
 521, 527, 743
*Elset, elset=_Plate-1_cont_S2
 522, 524, 530, 546, 575, 602, 606, 613
*Surface, type=ELEMENT, name=Plate-1_cont
_Plate-1_cont_S4, S4
_Plate-1_cont_S1, S1
_Plate-1_cont_S2, S2
** Section: sec2
*Solid Section, elset=Plate-1_Set-1, material=mat2
,
*System
*Nset, nset=_PickedSet11, generate
   1,  551,   11
*Nset, nset=_PickedSet11
563,567,625,626,627,628,629,630,631,632,633
*Elset, elset=_PickedSet11, generate
   1,  491,   10
*Elset, elset=_PickedSet11
 545, 548, 558, 559, 575, 576, 579, 580, 616, 640
**
** MATERIALS
**
** material of shaiba
*Material, name=mat1
*Elastic
100000., 0.3
*Plastic
120.,0.
** material of disc
*Material, name=mat2
*Elastic
200000., 0.3
*Plastic
240.,0.
**
** INTERACTION PROPERTIES
**
*Surface Interaction, name=IntProp-1
1.,
*Friction, slip tolerance=0.005
 0.2,
*Surface Interaction, name=IntProp-2
1.,
*Friction, slip tolerance=0.005
 0.4,
**
** BOUNDARY CONDITIONS
**
** Name: BC-1 Type: Symmetry/Antisymmetry/Encastre
*Boundary
Base-1_Set-1, ENCASTRE
** Name: BC-2 Type: Symmetry/Antisymmetry/Encastre
*Boundary
_PickedSet11, XSYMM
**
** INTERACTIONS
**
** Interaction: Int-1
*Contact Pair, interaction=IntProp-1, type=SURFACE TO SURFACE
Det-1_cont2, Base-1_RigidSurface_
** Interaction: Int-2
*Contact Pair, interaction=IntProp-2, type=SURFACE TO SURFACE
Det-1_cont1, Plate-1_cont
** ----------------------------------------------------------------
**
** STEP: Step-1
**
*Step, name=Step-1, nlgeom=YES, inc=1000
*Static
0.01, 1., 1e-05, 1.
**
** BOUNDARY CONDITIONS
**
** Name: BC-3 Type: Displacement/Rotation
*Boundary
Plate-1_Force1, 2, 2, -16.7
**
** OUTPUT REQUESTS
**
*Restart, write, frequency=0
**
** FIELD OUTPUT: F-Output-1
**
*Output, field, variable=PRESELECT
**
** HISTORY OUTPUT: H-Output-2
**
*Output, history
*Node Output, nset=Plate-1_Force
RF1, RF2, RF3, RM1, RM2, RM3, U1, U2
U3, UR1, UR2, UR3
**
** HISTORY OUTPUT: H-Output-1
**
*Output, history, variable=PRESELECT
*End Step
** ----------------------------------------------------------------
**
** STEP: Step-2
**
*Step, name=Step-2, nlgeom=YES, inc=1000
razgruzka
*Static
0.01, 1., 1e-05, 0.01
**
** BOUNDARY CONDITIONS
**
** Name: BC-3 Type: Displacement/Rotation
*Boundary
Plate-1_Force1, 2, 2
** Name: BC-4 Type: Symmetry/Antisymmetry/Encastre
*Boundary
Det-1_Set-2, PINNED
**
** OUTPUT REQUESTS
**
*Restart, write, frequency=0
**
** FIELD OUTPUT: F-Output-1
**
*Output, field, variable=PRESELECT
**
** HISTORY OUTPUT: H-Output-2, H-Output-2-Copy
**
*Output, history
*Node Output, nset=Plate-1_Force
RF1, RF2, RF3, RM1, RM2, RM3, U1, U2
U3, UR1, UR2, UR3
**
** HISTORY OUTPUT: H-Output-1
**
*Output, history, variable=PRESELECT
*End Step
